# OpenSim document version 40000
XsensDataReaderSettings:
  trial_prefix: XSDot_20210820_202113
  ExperimentalSensors:
    ExperimentalSensor _Pelvis: name_in_model=pelvis_imu
    ExperimentalSensor _RTibia: name_in_model=tibia_r_imu
    ExperimentalSensor _RFemur: name_in_model=femur_r_imu
    ExperimentalSensor _LTibia: name_in_model=tibia_l_imu
    ExperimentalSensor _LFemur: name_in_model=femur_l_imu
