# OpenSim document version 30000
Model Head Neck Skeleton:
  gravity: 0 -9.81 0
  BodySet:
    Body ground: mass=0 mass_center=(0 0 0) inertia_xx=0 inertia_yy=0 inertia_zz=0
    Body spine: mass=60 mass_center=(0 0 0) inertia_xx=1.6125 inertia_yy=0.3 inertia_zz=1.6125
        meshes=(tlspine.vtp rscapula.vtp rclavicle.vtp lscapula.vtp lclavicle.vtp ribcage.vtp)
      CustomJoint spine: parent_body=ground location_in_parent=(0 0 0) location=(0 0 0)
        Coordinate gndpitch: motion_type=rotational default_value=0 range=(-3.141593 3.141593) clamped=true locked=true
        Coordinate gndroll: motion_type=rotational default_value=0 range=(-3.141593 3.141593) clamped=true locked=true
        Coordinate gndyaw: motion_type=rotational default_value=0 range=(-3.141593 3.141593) clamped=true locked=true
        Coordinate gnd_tx: motion_type=translational default_value=0 range=(-3.141593 3.141593) clamped=false
            locked=true
        Coordinate gnd_ty: motion_type=translational default_value=0 range=(-3.141593 3.141593) clamped=false
            locked=true
        Coordinate gnd_tz: motion_type=translational default_value=0 range=(-3.141593 3.141593) clamped=false
            locked=true
        SpatialTransform:
          TransformAxis rotation1: coordinates=gndpitch axis=(0 0 1) LinearFunction(coefficients=1 0)
          TransformAxis rotation2: coordinates=gndroll axis=(1 0 0) LinearFunction(coefficients=1 0)
          TransformAxis rotation3: coordinates=gndyaw axis=(0 1 0) LinearFunction(coefficients=1 0)
          TransformAxis translation1: coordinates=gnd_tx axis=(1 0 0) LinearFunction(coefficients=1 0)
          TransformAxis translation2: coordinates=gnd_ty axis=(0 1 0) LinearFunction(coefficients=1 0)
          TransformAxis translation3: coordinates=gnd_tz axis=(0 0 1) LinearFunction(coefficients=1 0)
    Body cerv7: mass=0.4 mass_center=(-0.00884 0.009655 0) inertia_xx=0.0021 inertia_yy=0.0026 inertia_zz=0.0006
        meshes=rotatedcerv7.vtp
      CustomJoint cerv7jnt: parent_body=spine location_in_parent=(-0.0475 0.3613 0) location=(0 0 0)
        Coordinate pitch7: motion_type=rotational default_value=0 range=(-0.09599311 0.1396263) clamped=true
        Coordinate roll7: motion_type=rotational default_value=0 range=(-0.09599311 0.09599311) clamped=true
        Coordinate yaw7: motion_type=rotational default_value=0 range=(-0.07853982 0.07853982) clamped=true
        SpatialTransform: axes_held_at_zero=(translation1 translation2 translation3)
          TransformAxis rotation1: coordinates=pitch7 axis=(0 0 1) LinearFunction(coefficients=1 0)
          TransformAxis rotation2: coordinates=roll7 axis=(1 0 0) LinearFunction(coefficients=1 0)
          TransformAxis rotation3: coordinates=yaw7 axis=(0 1 0) LinearFunction(coefficients=1 0)
    Body cerv6: mass=0.226 mass_center=(-0.011419 0.009065 0) inertia_xx=0.0002 inertia_yy=0.00097 inertia_zz=0.00053
        meshes=cerv6.vtp
      CustomJoint cerv6jnt: parent_body=cerv7 location_in_parent=(0.006416 0.018035 0) location=(0 0 0)
        Coordinate pitch6: motion_type=rotational default_value=0 range=(-0.09599311 0.1396263) clamped=true
        Coordinate roll6: motion_type=rotational default_value=0 range=(-0.09599311 0.09599311) clamped=true
        Coordinate yaw6: motion_type=rotational default_value=0 range=(-0.07853982 0.07853982) clamped=true
        SpatialTransform: axes_held_at_zero=(translation1 translation2 translation3)
          TransformAxis rotation1: coordinates=pitch6 axis=(0 0 1) LinearFunction(coefficients=1 0)
          TransformAxis rotation2: coordinates=roll6 axis=(1 0 0) LinearFunction(coefficients=1 0)
          TransformAxis rotation3: coordinates=yaw6 axis=(0 1 0) LinearFunction(coefficients=1 0)
      WrapCylinder SCM_wrap: translation=(-0.01 0 0) quadrant=x radius=0.0325 length=0.2
    Body cerv5: mass=0.269 mass_center=(-0.00567 0.01615 0) inertia_xx=0.0006 inertia_yy=0.0014 inertia_zz=0.00048
        meshes=cerv5.vtp
      CustomJoint cerv5jnt: parent_body=cerv6 location_in_parent=(0.000431 0.013815 0) location=(0 0 0)
        Coordinate pitch5: motion_type=rotational default_value=0 range=(-0.09599311 0.1396263) clamped=true
        Coordinate roll5: motion_type=rotational default_value=0 range=(-0.09599311 0.09599311) clamped=true
        Coordinate yaw5: motion_type=rotational default_value=0 range=(-0.07853982 0.07853982) clamped=true
        SpatialTransform: axes_held_at_zero=(translation1 translation2 translation3)
          TransformAxis rotation1: coordinates=pitch5 axis=(0 0 1) LinearFunction(coefficients=1 0)
          TransformAxis rotation2: coordinates=roll5 axis=(1 0 0) LinearFunction(coefficients=1 0)
          TransformAxis rotation3: coordinates=yaw5 axis=(0 1 0) LinearFunction(coefficients=1 0)
    Body cerv4: mass=0.205 mass_center=(-0.00602 0.01232 0) inertia_xx=0.00015 inertia_yy=0.00056 inertia_zz=0.00037
        meshes=cerv4.vtp
      CustomJoint cerv4jnt: parent_body=cerv5 location_in_parent=(0.00276 0.0156 0) location=(0 0 0)
        Coordinate pitch4: motion_type=rotational default_value=0 range=(-0.09599311 0.1396263) clamped=true
        Coordinate roll4: motion_type=rotational default_value=0 range=(-0.09599311 0.09599311) clamped=true
        Coordinate yaw4: motion_type=rotational default_value=0 range=(-0.07853982 0.07853982) clamped=true
        SpatialTransform: axes_held_at_zero=(translation1 translation2 translation3)
          TransformAxis rotation1: coordinates=pitch4 axis=(0 0 1) LinearFunction(coefficients=1 0)
          TransformAxis rotation2: coordinates=roll4 axis=(1 0 0) LinearFunction(coefficients=1 0)
          TransformAxis rotation3: coordinates=yaw4 axis=(0 1 0) LinearFunction(coefficients=1 0)
    Body cerv3: mass=0.156 mass_center=(-0.00671 0.01602 0) inertia_xx=0.00033 inertia_yy=0.00043 inertia_zz=0.00026
        meshes=cerv3.vtp
      CustomJoint cerv3jnt: parent_body=cerv4 location_in_parent=(0.0023 0.0181 0) location=(0 0 0)
        Coordinate pitch3: motion_type=rotational default_value=0 range=(-0.09599311 0.1396263) clamped=true
        Coordinate roll3: motion_type=rotational default_value=0 range=(-0.09599311 0.09599311) clamped=true
        Coordinate yaw3: motion_type=rotational default_value=0 range=(-0.07853982 0.07853982) clamped=true
        SpatialTransform: axes_held_at_zero=(translation1 translation2 translation3)
          TransformAxis rotation1: coordinates=pitch3 axis=(0 0 1) LinearFunction(coefficients=1 0)
          TransformAxis rotation2: coordinates=roll3 axis=(1 0 0) LinearFunction(coefficients=1 0)
          TransformAxis rotation3: coordinates=yaw3 axis=(0 1 0) LinearFunction(coefficients=1 0)
    Body cerv2: mass=0.156 mass_center=(-0.00843 0.01723 0) inertia_xx=0.00033 inertia_yy=0.00043 inertia_zz=0.00026
        meshes=cerv2.vtp
      CustomJoint cerv2jnt: parent_body=cerv3 location_in_parent=(0.00054 0.01408 0) location=(0 0 0)
        Coordinate pitch2: motion_type=rotational default_value=0 range=(-0.09599311 0.1396263) clamped=true
        Coordinate roll2: motion_type=rotational default_value=0 range=(-0.09599311 0.09599311) clamped=true
        Coordinate yaw2: motion_type=rotational default_value=0 range=(-0.07853982 0.07853982) clamped=true
        SpatialTransform: axes_held_at_zero=(translation1 translation2 translation3)
          TransformAxis rotation1: coordinates=pitch2 axis=(0 0 1) LinearFunction(coefficients=1 0)
          TransformAxis rotation2: coordinates=roll2 axis=(1 0 0) LinearFunction(coefficients=1 0)
          TransformAxis rotation3: coordinates=yaw2 axis=(0 1 0) LinearFunction(coefficients=1 0)
    Body cerv1: mass=0.156 mass_center=(-0.01245 0.00048 0) inertia_xx=0.00033 inertia_yy=0.00043 inertia_zz=0.00026
        meshes=cerv1.vtp
      CustomJoint cerv1jnt: parent_body=cerv2 location_in_parent=(0.00146 0.03251 0) location=(0 0 0)
        Coordinate yaw1: motion_type=rotational default_value=0 range=(-0.6632251 0.6632251) clamped=true
        SpatialTransform: axes_held_at_zero=(rotation1 rotation2 translation1 translation2 translation3)
          TransformAxis rotation3: coordinates=yaw1 axis=(0 1 0) LinearFunction(coefficients=1 0)
    Body skull: mass=4.3 mass_center=(0.0173 0.063 0) inertia_xx=0.02073 inertia_yy=0.015 inertia_zz=0.022605
        meshes=(skull.vtp jaw.vtp)
      CustomJoint skulljnt: parent_body=cerv1 location_in_parent=(-0.012 0.0114 0) location=(0 0 0)
        Coordinate skullpitch: motion_type=rotational default_value=0 range=(-0.2792527 0.418879) clamped=true
        SpatialTransform: axes_held_at_zero=(rotation2 rotation3 translation1 translation2 translation3)
          TransformAxis rotation1: coordinates=skullpitch axis=(0 0 1) LinearFunction(coefficients=1 0)
  ForceSet:
    ObjectGroup sterno: members=(cleid_mast_l cleid_occ_l stern_mast_l cleid_mast_r cleid_occ_r stern_mast_r)
    ObjectGroup flexion: members=(cleid_mast_l cleid_occ_l long_cap_sklc4_l long_col_c1c5_l long_col_c1thx_l long_col_c5thx_l scalenus_ant_l stern_mast_l cleid_mast_r cleid_occ_r long_cap_sklc4_r long_col_c1c5_r long_col_c1thx_r long_col_c5thx_r scalenus_ant_r stern_mast_r)
    ObjectGroup rotation_contra: members=(cleid_mast_l cleid_occ_l long_cap_sklc4_l long_col_c1c5_l obl_cap_sup_l semi_cap_sklc5_l semi_cap_sklthx_l semi_cerv_c3thx_l stern_mast_l trap_acr_l trap_cl_l cleid_mast_r cleid_occ_r long_cap_sklc4_r long_col_c1c5_r obl_cap_sup_r semi_cap_sklc5_r semi_cap_sklthx_r semi_cerv_c3thx_r stern_mast_r trap_acr_r trap_cl_r)
    ObjectGroup lat_bending_left: members=(cleid_mast_l cleid_occ_l deepmult-C4/5-C2_l deepmult-C5/6-C3_l deepmult-C6/7-C4_l deepmult-T1-C5_l deepmult-T1-C6_l deepmult-T2-C7_l deepmult-T2-T1_l iliocost_cerv_c5rib_l levator_scap_l long_cap_sklc4_l long_col_c1c5_l long_col_c1thx_l long_col_c5thx_l longissi_cap_sklc6_l longissi_cerv_c4thx_l obl_cap_inf_l obl_cap_sup_l rectcap_post_maj_l scalenus_ant_l scalenus_med_l scalenus_post_l semi_cap_sklc5_l semi_cap_sklthx_l semi_cerv_c3thx_l splen_cap_sklc6_l splen_cap_sklthx_l splen_cerv_c3thx_l stern_mast_l supmult-C4/5-C2_l supmult-C5/6-C2_l supmult-C6/7-C2_l supmult-T1-C4_l supmult-T1-C5_l supmult-T2-C6_l trap_acr_l trap_cl_l)
    ObjectGroup lat_bending_right: members=(cleid_mast_r cleid_occ_r deepmult-C4/5-C2_r deepmult-C5/6-C3_r deepmult-C6/7-C4_r deepmult-T1-C5_r deepmult-T1-C6_r deepmult-T2-C7_r deepmult-T2-T1_r iliocost_cerv_c5rib_r levator_scap_r long_cap_sklc4_r long_col_c1c5_r long_col_c1thx_r long_col_c5thx_r longissi_cap_sklc6_r longissi_cerv_c4thx_r obl_cap_inf_r obl_cap_sup_r rectcap_post_maj_r scalenus_ant_r scalenus_med_r scalenus_post_r semi_cap_sklc5_r semi_cap_sklthx_r semi_cerv_c3thx_r splen_cap_sklc6_r splen_cap_sklthx_r splen_cerv_c3thx_r stern_mast_r supmult-C4/5-C2_r supmult-C5/6-C2_r supmult-C6/7-C2_r supmult-T1-C4_r supmult-T1-C5_r supmult-T2-C6_r trap_acr_r trap_cl_r)
    ObjectGroup scalenus: members=(scalenus_ant_l scalenus_med_l scalenus_post_l scalenus_ant_r scalenus_med_r scalenus_post_r)
    ObjectGroup extension: members=(deepmult-C4/5-C2_l deepmult-C5/6-C3_l deepmult-C6/7-C4_l deepmult-T1-C5_l deepmult-T1-C6_l deepmult-T2-C7_l deepmult-T2-T1_l iliocost_cerv_c5rib_l levator_scap_l longissi_cap_sklc6_l longissi_cerv_c4thx_l obl_cap_inf_l obl_cap_sup_l rectcap_post_maj_l rectcap_post_min_l scalenus_med_l scalenus_post_l semi_cap_sklc5_l semi_cap_sklthx_l semi_cerv_c3thx_l splen_cap_sklc6_l splen_cap_sklthx_l splen_cerv_c3thx_l supmult-C4/5-C2_l supmult-C5/6-C2_l supmult-C6/7-C2_l supmult-T1-C4_l supmult-T1-C5_l supmult-T2-C6_l trap_acr_l trap_cl_l deepmult-C4/5-C2_r deepmult-C5/6-C3_r deepmult-C6/7-C4_r deepmult-T1-C5_r deepmult-T1-C6_r deepmult-T2-C7_r deepmult-T2-T1_r iliocost_cerv_c5rib_r levator_scap_r longissi_cap_sklc6_r longissi_cerv_c4thx_r obl_cap_inf_r obl_cap_sup_r rectcap_post_maj_r rectcap_post_min_r scalenus_med_r scalenus_post_r semi_cap_sklc5_r semi_cap_sklthx_r semi_cerv_c3thx_r splen_cap_sklc6_r splen_cap_sklthx_r splen_cerv_c3thx_r supmult-C4/5-C2_r supmult-C5/6-C2_r supmult-C6/7-C2_r supmult-T1-C4_r supmult-T1-C5_r supmult-T2-C6_r trap_acr_r trap_cl_r)
    ObjectGroup rotation_ipsi: members=(iliocost_cerv_c5rib_l levator_scap_l long_col_c5thx_l longissi_cap_sklc6_l longissi_cerv_c4thx_l obl_cap_inf_l rectcap_post_maj_l scalenus_med_l scalenus_post_l splen_cap_sklc6_l splen_cap_sklthx_l splen_cerv_c3thx_l iliocost_cerv_c5rib_r levator_scap_r long_col_c5thx_r longissi_cap_sklc6_r longissi_cerv_c4thx_r obl_cap_inf_r rectcap_post_maj_r scalenus_med_r scalenus_post_r splen_cap_sklc6_r splen_cap_sklthx_r splen_cerv_c3thx_r)
    ObjectGroup longus: members=(long_cap_sklc4_l long_col_c1c5_l long_col_c1thx_l long_col_c5thx_l long_cap_sklc4_r long_col_c1c5_r long_col_c1thx_r long_col_c5thx_r)
    ObjectGroup trapezius: members=(trap_acr_l trap_cl_l trap_acr_r trap_cl_r)
    ObjectGroup splenius: members=(splen_cap_sklc6_l splen_cap_sklthx_l splen_cerv_c3thx_l splen_cap_sklc6_r splen_cap_sklthx_r splen_cerv_c3thx_r)
    ObjectGroup semispinalis: members=(semi_cap_sklc5_l semi_cap_sklthx_l semi_cerv_c3thx_l semi_cap_sklc5_r semi_cap_sklthx_r semi_cerv_c3thx_r)
    ObjectGroup levator_scap: members=(levator_scap_l levator_scap_r)
    ObjectGroup erectorspinae: members=(iliocost_cerv_c5rib_l longissi_cap_sklc6_l longissi_cerv_c4thx_l iliocost_cerv_c5rib_r longissi_cap_sklc6_r longissi_cerv_c4thx_r)
    ObjectGroup suboccipital: members=(obl_cap_inf_l obl_cap_sup_l rectcap_post_maj_l rectcap_post_min_l obl_cap_inf_r obl_cap_sup_r rectcap_post_maj_r rectcap_post_min_r)
    ObjectGroup multifidus: members=(deepmult-C4/5-C2_l deepmult-C5/6-C3_l deepmult-C6/7-C4_l deepmult-T1-C5_l deepmult-T1-C6_l deepmult-T2-C7_l deepmult-T2-T1_l supmult-C4/5-C2_l supmult-C5/6-C2_l supmult-C6/7-C2_l supmult-T1-C4_l supmult-T1-C5_l supmult-T2-C6_l deepmult-C4/5-C2_r deepmult-C5/6-C3_r deepmult-C6/7-C4_r deepmult-T1-C5_r deepmult-T1-C6_r deepmult-T2-C7_r deepmult-T2-T1_r supmult-C4/5-C2_r supmult-C5/6-C2_r supmult-C6/7-C2_r supmult-T1-C4_r supmult-T1-C5_r supmult-T2-C6_r)
    ObjectGroup Annulus Fibrous: members=(AF_l_spine AF_r_spine AF_l_cerv7 AF_r_cerv7 AF_l_cerv6 AF_r_cerv6 AF_l_cerv5 AF_r_cerv5 AF_l_cerv4 AF_r_cerv4 AF_l_cerv3 AF_r_cerv3)
    ObjectGroup Anterior Longitudinal Ligament: members=(ALL_spine ALL_cerv7 ALL_cerv6 ALL_cerv5 ALL_cerv4 ALL_cerv3 AAA_l_cerv2_cerv1 AAA_r_cerv2_cerv1 AAO_l_cerv1_skull AAO_r_cerv1_skull)
    ObjectGroup Posterior Longitudinal Ligament: members=(PLL_spine PLL_cerv7 PLL_cerv6 PLL_cerv5 PLL_cerv4 PLL_cerv3)
    ObjectGroup Ligamentum Flavum: members=(LF_l_spine_cerv7 LF_r_spine_cerv7 LF_l_cerv7_cerv6 LF_r_cerv7_cerv6 LF_l_cerv6_cerv5 LF_r_cerv6_cerv5 LF_l_cerv5_cerv4 LF_r_cerv5_cerv4 LF_l_cerv4_cerv3 LF_r_cerv4_cerv3 LF_l_cerv3_cerv2 LF_r_cerv3_cerv2 PAA_l_cerv2_cerv1 PAA_r_cerv2_cerv1 PAO_l_cerv1_skull PAO_r_cerv1_skull)
    ObjectGroup Joint Capsules: members=(IT_l_spine_cerv7 IT_r_spine_cerv7 IT_l_cerv7_cerv6 IT_r_cerv7_cerv6 IT_l_cerv6_cerv5 IT_r_cerv6_cerv5 IT_l_cerv5_cerv4 IT_r_cerv5_cerv4 IT_l_cerv4_cerv3 IT_r_cerv4_cerv3 IT_l_cerv3_cerv2 IT_r_cerv3_cerv2 IT_l_cerv2_cerv1 IT_r_cerv2_cerv1 IT_l_cerv1_skull IT_r_cerv1_skull)
    ObjectGroup Interspinous Ligament: members=(IS_spine_cerv7 IS_cerv7_cerv6 IS_cerv6_cerv5 IS_cerv5_cerv4 IS_cerv4_cerv3 IS_cerv3_cerv2)
    ObjectGroup Cranial-Cervical Junction Ligament: members=(TM_cerv2_skull AL_l_cerv2_skull AL_r_cerv2_skull API_cerv2_skull CLT_cerv2_cerv1)
    DynamicLigamentForce ALL_spine: resting_length=0.00408534 [m] cross_sectional_area=1.230602e-5 toe_strain=1.27
        toe_modulus=4.26 linear_modulus=8.51765 rate_scale=1.332107 rate_intercept=0.01
      PathPoint spine_point: spine (-0.035 0.3595 0)
      PathPoint cerv7_point: cerv7 (0.014 0.002 0)
    DynamicLigamentForce AF_l_spine: resting_length=0.008982761 cross_sectional_area=0.0001 toe_strain=1.05
        toe_modulus=25 linear_modulus=50 rate_scale=1.5 rate_intercept=0.01
      PathPoint spine_point: spine (-0.035 0.3595 -0.004)
      PathPoint cerv7_point: cerv7 (0.014 0.002 0.004)
    DynamicLigamentForce AF_r_spine: resting_length=0.008982761 cross_sectional_area=0.0001 toe_strain=1.05
        toe_modulus=25 linear_modulus=50 rate_scale=1.5 rate_intercept=0.01
      PathPoint spine_point: spine (-0.035 0.3595 0.004)
      PathPoint cerv7_point: cerv7 (0.014 0.002 -0.004)
    DynamicLigamentForce PLL_spine: resting_length=0.00408534 cross_sectional_area=1.559055e-5 toe_strain=1.17
        toe_modulus=5.02 linear_modulus=10.04199 rate_scale=1.262483 rate_intercept=0.01
      PathPoint spine_point: spine (-0.057 0.3625 0)
      PathPoint cerv7_point: cerv7 (-0.008 0.005 0)
    DynamicLigamentForce LF_r_spine_cerv7: resting_length=0.009420191 cross_sectional_area=2.132464e-5 toe_strain=1.26
        toe_modulus=3.65 linear_modulus=7.852399 rate_scale=1.173925 rate_intercept=0.01
      PathPoint spine_point: spine (-0.062 0.365 0.01)
      PathPoint cerv7_point: cerv7 (-0.013 0.013 0.01)
    DynamicLigamentForce LF_l_spine_cerv7: resting_length=0.009420191 cross_sectional_area=2.132464e-5 toe_strain=1.26
        toe_modulus=3.65 linear_modulus=7.852399 rate_scale=1.173925 rate_intercept=0.01
      PathPoint spine_point: spine (-0.062 0.365 -0.01)
      PathPoint cerv7_point: cerv7 (-0.013 0.013 -0.01)
    DynamicLigamentForce IS_spine_cerv7: resting_length=0.009794897 cross_sectional_area=2.394158e-5 toe_strain=1.13
        toe_modulus=1.26 linear_modulus=2.525248 rate_scale=1.29279 rate_intercept=0.01
      PathPoint spine_point: spine (-0.085 0.365 0)
      PathPoint cerv7_point: cerv7 (-0.03 0.01 0)
    DynamicLigamentForce IT_r_spine_cerv7: resting_length=0.004328972 cross_sectional_area=5.548986e-5 toe_strain=1.17
        toe_modulus=0.988 linear_modulus=1.977399 rate_scale=1.166724 rate_intercept=0.01
      PathPoint spine_point: spine (-0.059 0.3685 0.028)
      PathPoint cerv7_point: cerv7 (-0.011 0.0115 0.028)
    DynamicLigamentForce IT_l_spine_cerv7: resting_length=0.004328972 cross_sectional_area=5.548986e-5 toe_strain=1.17
        toe_modulus=0.988 linear_modulus=1.977399 rate_scale=1.166724 rate_intercept=0.01
      PathPoint spine_point: spine (-0.059 0.3685 -0.028)
      PathPoint cerv7_point: cerv7 (-0.011 0.0115 -0.028)
    DynamicLigamentForce ALL_cerv7: resting_length=0.004056388 cross_sectional_area=1.175042e-5 toe_strain=1.27
        toe_modulus=4.225 linear_modulus=8.4508 rate_scale=1.381443 rate_intercept=0.01
      PathPoint cerv7_point: cerv7 (0.017 0.016 0)
      PathPoint cerv6_point: cerv6 (0.011 0.002 0)
    DynamicLigamentForce AF_l_cerv7: resting_length=0.008969631 cross_sectional_area=0.0001 toe_strain=1.05
        toe_modulus=25 linear_modulus=50 rate_scale=1.5 rate_intercept=0.01
      PathPoint cerv7_point: cerv7 (0.017 0.016 -0.004)
      PathPoint cerv6_point: cerv6 (0.011 0.002 0.004)
    DynamicLigamentForce AF_r_cerv7: resting_length=0.008969631 cross_sectional_area=0.0001 toe_strain=1.05
        toe_modulus=25 linear_modulus=50 rate_scale=1.5 rate_intercept=0.01
      PathPoint cerv7_point: cerv7 (0.017 0.016 0.004)
      PathPoint cerv6_point: cerv6 (0.011 0.002 -0.004)
    DynamicLigamentForce PLL_cerv7: resting_length=0.004056388 cross_sectional_area=1.465004e-5 toe_strain=1.17
        toe_modulus=4.84 linear_modulus=9.6813 rate_scale=1.37208 rate_intercept=0.01
      PathPoint cerv7_point: cerv7 (-0.002 0.016 0)
      PathPoint cerv6_point: cerv6 (-0.008 0.002 0)
    DynamicLigamentForce LF_r_cerv7_cerv6: resting_length=0.009145287 cross_sectional_area=2.070234e-5 toe_strain=1.26
        toe_modulus=3.437 linear_modulus=6.875054 rate_scale=1.219739 rate_intercept=0.01
      PathPoint cerv7_point: cerv7 (-0.012 0.0215 0.01)
      PathPoint cerv6_point: cerv6 (-0.017 0.0125 0.01)
    DynamicLigamentForce LF_l_cerv7_cerv6: resting_length=0.009145287 cross_sectional_area=2.070234e-5 toe_strain=1.26
        toe_modulus=3.437 linear_modulus=6.875054 rate_scale=1.219739 rate_intercept=0.01
      PathPoint cerv7_point: cerv7 (-0.012 0.0215 -0.01)
      PathPoint cerv6_point: cerv6 (-0.017 0.0125 -0.01)
    DynamicLigamentForce IS_cerv7_cerv6: resting_length=0.01108135 cross_sectional_area=1.4535e-5 toe_strain=1.13
        toe_modulus=1.727 linear_modulus=3.455275 rate_scale=1.276954 rate_intercept=0.01
      PathPoint cerv7_point: cerv7 (-0.035 0.02 0)
      PathPoint cerv6_point: cerv6 (-0.035 0.011 0)
    DynamicLigamentForce IT_r_cerv7_cerv6: resting_length=0.004087087 cross_sectional_area=5.238931e-5 toe_strain=1.17
        toe_modulus=1.039 linear_modulus=2.078959 rate_scale=1.148528 rate_intercept=0.01
      PathPoint cerv7_point: cerv7 (-0.009 0.0255 0.028)
      PathPoint cerv6_point: cerv6 (-0.015 0.0115 0.0275)
    DynamicLigamentForce IT_l_cerv7_cerv6: resting_length=0.004087087 cross_sectional_area=5.238931e-5 toe_strain=1.17
        toe_modulus=1.039 linear_modulus=2.078959 rate_scale=1.148528 rate_intercept=0.01
      PathPoint cerv7_point: cerv7 (-0.009 0.0255 -0.028)
      PathPoint cerv6_point: cerv6 (-0.015 0.0115 -0.0275)
    DynamicLigamentForce ALL_cerv6: resting_length=0.004074553 cross_sectional_area=1.076462e-5 toe_strain=1.27
        toe_modulus=4.7 linear_modulus=9.398458 rate_scale=1.253537 rate_intercept=0.01
      PathPoint cerv6_point: cerv6 (0.012 0.012 0)
      PathPoint cerv5_point: cerv5 (0.013 0.002 0)
    DynamicLigamentForce AF_l_cerv6: resting_length=0.008977861 cross_sectional_area=0.00004 toe_strain=1.05
        toe_modulus=25 linear_modulus=50 rate_scale=1.5 rate_intercept=0.01
      PathPoint cerv6_point: cerv6 (0.012 0.012 -0.004)
      PathPoint cerv5_point: cerv5 (0.013 0.002 0.004)
    DynamicLigamentForce AF_r_cerv6: resting_length=0.008977861 cross_sectional_area=0.00004 toe_strain=1.05
        toe_modulus=25 linear_modulus=50 rate_scale=1.5 rate_intercept=0.01
      PathPoint cerv6_point: cerv6 (0.012 0.012 0.004)
      PathPoint cerv5_point: cerv5 (0.013 0.002 -0.004)
    DynamicLigamentForce PLL_cerv6: resting_length=0.003857199 cross_sectional_area=1.307158e-5 toe_strain=1.17
        toe_modulus=6.85 linear_modulus=13.71436 rate_scale=1.231199 rate_intercept=0.01
      PathPoint cerv6_point: cerv6 (-0.004 0.02 0)
      PathPoint cerv5_point: cerv5 (-0.005 0.01 0)
    DynamicLigamentForce LF_r_cerv6_cerv5: resting_length=0.007826876 cross_sectional_area=1.783349e-5 toe_strain=1.26
        toe_modulus=1.99 linear_modulus=3.983592 rate_scale=1.357092 rate_intercept=0.01
      PathPoint cerv6_point: cerv6 (-0.012 0.022 0.01)
      PathPoint cerv5_point: cerv5 (-0.012 0.016 0.01)
    DynamicLigamentForce LF_l_cerv6_cerv5: resting_length=0.007826876 cross_sectional_area=1.783349e-5 toe_strain=1.26
        toe_modulus=1.99 linear_modulus=3.983592 rate_scale=1.357092 rate_intercept=0.01
      PathPoint cerv6_point: cerv6 (-0.012 0.022 -0.01)
      PathPoint cerv5_point: cerv5 (-0.012 0.016 -0.01)
    DynamicLigamentForce IS_cerv6_cerv5: resting_length=0.008714355 cross_sectional_area=2.065231e-5 toe_strain=1.13
        toe_modulus=1.26 linear_modulus=2.518119 rate_scale=1.280005 rate_intercept=0.01
      PathPoint cerv6_point: cerv6 (-0.037 0.0185 0)
      PathPoint cerv5_point: cerv5 (-0.032 0.0115 0)
    DynamicLigamentForce IT_r_cerv6_cerv5: resting_length=0.003839269 cross_sectional_area=4.718549e-5 toe_strain=1.17
        toe_modulus=0.766 linear_modulus=1.533713 rate_scale=1.23168 rate_intercept=0.01
      PathPoint cerv6_point: cerv6 (-0.012 0.024 0.027)
      PathPoint cerv5_point: cerv5 (-0.012 0.014 0.0265)
    DynamicLigamentForce IT_l_cerv6_cerv5: resting_length=0.003839269 cross_sectional_area=4.718549e-5 toe_strain=1.17
        toe_modulus=0.766 linear_modulus=1.533713 rate_scale=1.23168 rate_intercept=0.01
      PathPoint cerv6_point: cerv6 (-0.012 0.024 -0.027)
      PathPoint cerv5_point: cerv5 (-0.012 0.014 -0.0265)
    DynamicLigamentForce ALL_cerv5: resting_length=0.004268208 cross_sectional_area=1.029291e-5 toe_strain=1.27
        toe_modulus=4.224 linear_modulus=8.448737 rate_scale=1.4274 rate_intercept=0.01
      PathPoint cerv5_point: cerv5 (0.015 0.0177 0)
      PathPoint cerv4_point: cerv4 (0.013 0.0063 0)
    DynamicLigamentForce AF_l_cerv5: resting_length=0.009067392 cross_sectional_area=0.00004 toe_strain=1.05
        toe_modulus=25 linear_modulus=50 rate_scale=1.5 rate_intercept=0.01
      PathPoint cerv5_point: cerv5 (0.015 0.0177 -0.004)
      PathPoint cerv4_point: cerv4 (0.013 0.0063 0.004)
    DynamicLigamentForce AF_r_cerv5: resting_length=0.009067392 cross_sectional_area=0.00004 toe_strain=1.05
        toe_modulus=25 linear_modulus=50 rate_scale=1.5 rate_intercept=0.01
      PathPoint cerv5_point: cerv5 (0.015 0.0177 0.004)
      PathPoint cerv4_point: cerv4 (0.013 0.0063 -0.004)
    DynamicLigamentForce PLL_cerv5: resting_length=0.003679348 cross_sectional_area=1.132503e-5 toe_strain=1.17
        toe_modulus=7 linear_modulus=14.00181 rate_scale=1.34615 rate_intercept=0.01
      PathPoint cerv5_point: cerv5 (-0.003 0.024 0)
      PathPoint cerv4_point: cerv4 (-0.005 0.012 0)
    DynamicLigamentForce LF_r_cerv5_cerv4: resting_length=0.007603789 cross_sectional_area=1.732519e-5 toe_strain=1.26
        toe_modulus=1.85 linear_modulus=3.692492 rate_scale=1.404562 rate_intercept=0.01
      PathPoint cerv5_point: cerv5 (-0.012 0.025 0.01)
      PathPoint cerv4_point: cerv4 (-0.015 0.017 0.01)
    DynamicLigamentForce LF_l_cerv5_cerv4: resting_length=0.007603789 cross_sectional_area=1.732519e-5 toe_strain=1.26
        toe_modulus=1.85 linear_modulus=3.692492 rate_scale=1.404562 rate_intercept=0.01
      PathPoint cerv5_point: cerv5 (-0.012 0.025 -0.01)
      PathPoint cerv4_point: cerv4 (-0.015 0.017 -0.01)
    DynamicLigamentForce IS_cerv5_cerv4: resting_length=0.01035073 cross_sectional_area=1.121723e-5 toe_strain=1.13
        toe_modulus=2.9 linear_modulus=5.798681 rate_scale=1.117581 rate_intercept=0.01
      PathPoint cerv5_point: cerv5 (-0.034 0.021 0)
      PathPoint cerv4_point: cerv4 (-0.031 0.014 0)
    DynamicLigamentForce IT_r_cerv5_cerv4: resting_length=0.00466236 cross_sectional_area=5.730146e-5 toe_strain=1.17
        toe_modulus=0.796 linear_modulus=1.591971 rate_scale=1.217349 rate_intercept=0.01
      PathPoint cerv5_point: cerv5 (-0.01 0.025 0.0245)
      PathPoint cerv4_point: cerv4 (-0.012 0.014 0.024)
    DynamicLigamentForce IT_l_cerv5_cerv4: resting_length=0.00466236 cross_sectional_area=5.730146e-5 toe_strain=1.17
        toe_modulus=0.796 linear_modulus=1.591971 rate_scale=1.217349 rate_intercept=0.01
      PathPoint cerv5_point: cerv5 (-0.01 0.025 -0.0245)
      PathPoint cerv4_point: cerv4 (-0.012 0.014 -0.024)
    DynamicLigamentForce ALL_cerv4: resting_length=0.003612478 cross_sectional_area=1.040097e-5 toe_strain=1.27
        toe_modulus=3.98 linear_modulus=7.960583 rate_scale=1.369025 rate_intercept=0.01
      PathPoint cerv4_point: cerv4 (0.015 0.0215 0)
      PathPoint cerv3_point: cerv3 (0.013 0.007 0)
    DynamicLigamentForce AF_r_cerv4: resting_length=0.008777813 cross_sectional_area=0.00003 toe_strain=1.05
        toe_modulus=25 linear_modulus=50 rate_scale=1.5 rate_intercept=0.01
      PathPoint cerv4_point: cerv4 (0.015 0.0215 0.004)
      PathPoint cerv3_point: cerv3 (0.013 0.007 -0.004)
    DynamicLigamentForce AF_l_cerv4: resting_length=0.008777813 cross_sectional_area=0.00003 toe_strain=1.05
        toe_modulus=25 linear_modulus=50 rate_scale=1.5 rate_intercept=0.01
      PathPoint cerv4_point: cerv4 (0.015 0.0215 -0.004)
      PathPoint cerv3_point: cerv3 (0.013 0.007 0.004)
    DynamicLigamentForce PLL_cerv4: resting_length=0.004159327 cross_sectional_area=1.056367e-5 toe_strain=1.17
        toe_modulus=6.417 linear_modulus=12.83497 rate_scale=1.295493 rate_intercept=0.01
      PathPoint cerv4_point: cerv4 (-0.004 0.024 0)
      PathPoint cerv3_point: cerv3 (-0.007 0.01 0)
    DynamicLigamentForce LF_r_cerv4_cerv3: resting_length=0.008105554 cross_sectional_area=2.13474e-5 toe_strain=1.26
        toe_modulus=3.2 linear_modulus=6.400725 rate_scale=1.145829 rate_intercept=0.01
      PathPoint cerv4_point: cerv4 (-0.012 0.026 0.01)
      PathPoint cerv3_point: cerv3 (-0.014 0.016 0.01)
    DynamicLigamentForce LF_l_cerv4_cerv3: resting_length=0.008105554 cross_sectional_area=2.13474e-5 toe_strain=1.26
        toe_modulus=3.2 linear_modulus=6.400725 rate_scale=1.145829 rate_intercept=0.01
      PathPoint cerv4_point: cerv4 (-0.012 0.026 -0.01)
      PathPoint cerv3_point: cerv3 (-0.014 0.016 -0.01)
    DynamicLigamentForce IS_cerv4_cerv3: resting_length=0.007829432 cross_sectional_area=1.929932e-5 toe_strain=1.13
        toe_modulus=1.71 linear_modulus=3.420321 rate_scale=1.317074 rate_intercept=0.01
      PathPoint cerv4_point: cerv4 (-0.033 0.017 0)
      PathPoint cerv3_point: cerv3 (-0.032 0.006 0)
    DynamicLigamentForce IT_r_cerv4_cerv3: resting_length=0.004110961 cross_sectional_area=4.577035e-5 toe_strain=1.17
        toe_modulus=1.322 linear_modulus=2.644798 rate_scale=1.158639 rate_intercept=0.01
      PathPoint cerv4_point: cerv4 (-0.01 0.026 0.022)
      PathPoint cerv3_point: cerv3 (-0.012 0.012 0.022)
    DynamicLigamentForce IT_l_cerv4_cerv3: resting_length=0.004110961 cross_sectional_area=4.577035e-5 toe_strain=1.17
        toe_modulus=1.322 linear_modulus=2.644798 rate_scale=1.158639 rate_intercept=0.01
      PathPoint cerv4_point: cerv4 (-0.01 0.026 -0.022)
      PathPoint cerv3_point: cerv3 (-0.012 0.012 -0.022)
    DynamicLigamentForce ALL_cerv3: resting_length=0.004105849 cross_sectional_area=1.12762e-5 toe_strain=1.27
        toe_modulus=4.61 linear_modulus=9.220118 rate_scale=1.35086 rate_intercept=0.01
      PathPoint cerv3_point: cerv3 (0.013 0.022 0)
      PathPoint cerv2_point: cerv2 (0.012 0.012 0)
    DynamicLigamentForce AF_r_cerv3: resting_length=0.008992108 cross_sectional_area=0.00002 toe_strain=1.05
        toe_modulus=25 linear_modulus=50 rate_scale=1.5 rate_intercept=0.01
      PathPoint cerv3_point: cerv3 (0.013 0.022 0.004)
      PathPoint cerv2_point: cerv2 (0.012 0.012 -0.004)
    DynamicLigamentForce AF_l_cerv3: resting_length=0.008992108 cross_sectional_area=0.00002 toe_strain=1.05
        toe_modulus=25 linear_modulus=50 rate_scale=1.5 rate_intercept=0.01
      PathPoint cerv3_point: cerv3 (0.013 0.022 -0.004)
      PathPoint cerv2_point: cerv2 (0.012 0.012 0.004)
    DynamicLigamentForce PLL_cerv3: resting_length=0.003941827 cross_sectional_area=9.717888e-6 toe_strain=1.17
        toe_modulus=8.778 linear_modulus=16.55776 rate_scale=1.217925 rate_intercept=0.01
      PathPoint cerv3_point: cerv3 (-0.003 0.023 0)
      PathPoint cerv2_point: cerv2 (-0.006 0.012 0)
    DynamicLigamentForce LF_r_cerv3_cerv2: resting_length=0.00759921 cross_sectional_area=2.001386e-5 toe_strain=1.26
        toe_modulus=2.177 linear_modulus=4.35478 rate_scale=1.302194 rate_intercept=0.01
      PathPoint cerv3_point: cerv3 (-0.014 0.023 0.007)
      PathPoint cerv2_point: cerv2 (-0.014 0.0165 0.007)
    DynamicLigamentForce LF_l_cerv3_cerv2: resting_length=0.00759921 cross_sectional_area=2.001386e-5 toe_strain=1.26
        toe_modulus=2.177 linear_modulus=4.35478 rate_scale=1.302194 rate_intercept=0.01
      PathPoint cerv3_point: cerv3 (-0.014 0.023 -0.007)
      PathPoint cerv2_point: cerv2 (-0.014 0.0165 -0.007)
    DynamicLigamentForce IS_cerv3_cerv2: resting_length=0.009796836 cross_sectional_area=9.770803e-6 toe_strain=1.13
        toe_modulus=2.787 linear_modulus=5.474349 rate_scale=1.191748 rate_intercept=0.01
      PathPoint cerv3_point: cerv3 (-0.034 0.012 0)
      PathPoint cerv2_point: cerv2 (-0.029 0.006 0)
    DynamicLigamentForce IT_r_cerv3_cerv2: resting_length=0.00411558 cross_sectional_area=4.582178e-5 toe_strain=1.17
        toe_modulus=1.2075 linear_modulus=2.415054 rate_scale=1.187581 rate_intercept=0.01
      PathPoint cerv3_point: cerv3 (-0.012 0.025 0.021)
      PathPoint cerv2_point: cerv2 (-0.012 0.015 0.021)
    DynamicLigamentForce IT_l_cerv3_cerv2: resting_length=0.00411558 cross_sectional_area=4.582178e-5 toe_strain=1.17
        toe_modulus=1.2075 linear_modulus=2.415054 rate_scale=1.187581 rate_intercept=0.01
      PathPoint cerv3_point: cerv3 (-0.012 0.025 -0.021)
      PathPoint cerv2_point: cerv2 (-0.012 0.015 -0.021)
    DynamicLigamentForce TM_cerv2_skull: resting_length=0.01852039 cross_sectional_area=3.232258e-5 toe_strain=1.078
        toe_modulus=20.987 linear_modulus=40.97411 rate_scale=1.746942 rate_intercept=0.01
      PathPoint cerv2_point: cerv2 (-0.006 0.03 0)
      PathPoint cerv1_point: cerv1 (-0.009 0.007 0)
      PathPoint skull_point: skull (0.0059 0.004 0)
    DynamicLigamentForce AL_r_cerv2_skull: resting_length=0.01014582 cross_sectional_area=2.096261e-5 toe_strain=1.05
        toe_modulus=8.049 linear_modulus=16.09828 rate_scale=1.130844 rate_intercept=0.01
      PathPoint cerv2_point: cerv2 (-0.003 0.04 0.004)
      PathPoint skull_point: skull (0.0119 0.002 0.011)
    DynamicLigamentForce AL_l_cerv2_skull: resting_length=0.01014582 cross_sectional_area=2.096261e-5 toe_strain=1.05
        toe_modulus=8.049 linear_modulus=16.09828 rate_scale=1.130844 rate_intercept=0.01
      PathPoint cerv2_point: cerv2 (-0.003 0.04 -0.004)
      PathPoint skull_point: skull (0.0119 0.002 -0.011)
    DynamicLigamentForce API_cerv2_skull: resting_length=0.01392472 cross_sectional_area=1.902811e-5 toe_strain=1.078
        toe_modulus=10.972 linear_modulus=20.94404 rate_scale=1.746942 rate_intercept=0.01
      PathPoint cerv2_point: cerv2 (0.002 0.039 0)
      PathPoint skull_point: skull (0.0119 0.009 0)
    DynamicLigamentForce CLT_cerv2_cerv1: resting_length=0.02030879 cross_sectional_area=1.857129e-5
        toe_strain=1.110149 toe_modulus=26.9165 linear_modulus=53.83307 rate_scale=1.313152 rate_intercept=0.01
      PathPoint cerv1_r_point: cerv1 (-0.003 0.001 0.009)
      PathPoint cerv2_point: cerv2 (-0.006 0.035 0)
      PathPoint cerv1_l_point: cerv1 (-0.003 0.001 -0.009)
    DynamicLigamentForce AAA_r_cerv2_cerv1: resting_length=0.01181235 cross_sectional_area=2.384258e-5
        toe_strain=1.076183 toe_modulus=5.205 linear_modulus=10.41169 rate_scale=1.3 rate_intercept=0.01
      PathPoint cerv2_point: cerv2 (0.008 0.022 0.006)
      PathPoint cerv1_point: cerv1 (0.009 0.001 0.007)
      # Same as AAO
    DynamicLigamentForce AAA_l_cerv2_cerv1: resting_length=0.01181235 cross_sectional_area=2.384258e-5
        toe_strain=1.076183 toe_modulus=5.205 linear_modulus=10.41169 rate_scale=1.3 rate_intercept=0.01
      PathPoint cerv2_point: cerv2 (0.008 0.022 -0.006)
      PathPoint cerv1_point: cerv1 (0.009 0.001 -0.007)
      # Same as ALL along rest of spine
    DynamicLigamentForce JC_r_cerv2_cerv1: resting_length=0.01493559 cross_sectional_area=3.982823e-5 toe_strain=1.078
        toe_modulus=5.8686 linear_modulus=10.73718 rate_scale=1.729493 rate_intercept=0.01
      PathPoint cerv2_point: cerv2 (-0.008 0.019 0.02)
      PathPoint cerv1_point: cerv1 (-0.013 0.001 0.02)
    DynamicLigamentForce JC_l_cerv2_cerv1: resting_length=0.01493559 cross_sectional_area=3.982823e-5 toe_strain=1.078
        toe_modulus=5.8686 linear_modulus=10.73718 rate_scale=1.729493 rate_intercept=0.01
      PathPoint cerv2_point: cerv2 (-0.008 0.019 -0.02)
      PathPoint cerv1_point: cerv1 (-0.013 0.001 -0.02)
    DynamicLigamentForce PAA_r_cerv2_cerv1: resting_length=0.015147 cross_sectional_area=0.00001038224
        toe_strain=1.085878 toe_modulus=10.827 linear_modulus=21.65421 rate_scale=1.3 rate_intercept=0.01
      PathPoint cerv2_point: cerv2 (-0.018 0.019 0.006)
      PathPoint cerv1_point: cerv1 (-0.028 -0.002 0.006)
      # Same as LF lower
    DynamicLigamentForce PAA_l_cerv2_cerv1: resting_length=0.015147 cross_sectional_area=0.00001038224
        toe_strain=1.085878 toe_modulus=10.827 linear_modulus=21.65421 rate_scale=1.3 rate_intercept=0.01
      PathPoint cerv2_point: cerv2 (-0.018 0.019 -0.006)
      PathPoint cerv1_point: cerv1 (-0.028 -0.002 -0.006)
      # Same as LF lower
    DynamicLigamentForce AAO_r_cerv1_skull: resting_length=0.0127346 cross_sectional_area=4.429625e-5 toe_strain=1.1247
        toe_modulus=0.6386 linear_modulus=1.277195 rate_scale=2.558271 rate_intercept=0.01
      PathPoint cerv1_point: cerv1 (0.007 0.008 0.013)
      PathPoint skull_point: skull (0.0169 0.009 0.011)
    DynamicLigamentForce AAO_l_cerv1_skull: resting_length=0.0127346 cross_sectional_area=4.429625e-5 toe_strain=1.1247
        toe_modulus=0.6386 linear_modulus=1.277195 rate_scale=2.558271 rate_intercept=0.01
      PathPoint cerv1_point: cerv1 (0.007 0.008 -0.013)
      PathPoint skull_point: skull (0.0169 0.009 -0.011)
    DynamicLigamentForce JC_r_cerv1_skull: resting_length=0.01908848 cross_sectional_area=3.817696e-5 toe_strain=1.071
        toe_modulus=23.64 linear_modulus=47.28253 rate_scale=1.381871 rate_intercept=0.01
      PathPoint cerv1_point: cerv1 (-0.013 0.003 0.02)
      PathPoint skull_point: skull (-0.0001 0.01 0.025)
      # Same as PLL along rest of spine
    DynamicLigamentForce JC_l_cerv1_skull: resting_length=0.01908848 cross_sectional_area=3.817696e-5 toe_strain=1.071
        toe_modulus=23.64 linear_modulus=47.28253 rate_scale=1.381871 rate_intercept=0.01
      PathPoint cerv1_point: cerv1 (-0.013 0.003 -0.02)
      PathPoint skull_point: skull (-0.0001 0.01 -0.025)
      # Same as PLL along rest of spine
    DynamicLigamentForce PAO_r_cerv1_skull: resting_length=0.01360037 cross_sectional_area=4.771853e-5
        toe_strain=1.084052 toe_modulus=0.392 linear_modulus=0.7847447 rate_scale=2.852321 rate_intercept=0.01
      PathPoint cerv1_point: cerv1 (-0.03 0.001 0.009)
      PathPoint skull_point: skull (-0.0201 0.003 0.01)
    DynamicLigamentForce PAO_l_cerv1_skull: resting_length=0.01360037 cross_sectional_area=4.771853e-5
        toe_strain=1.084052 toe_modulus=0.392 linear_modulus=0.7847447 rate_scale=2.852321 rate_intercept=0.01
      PathPoint cerv1_point: cerv1 (-0.03 0.001 -0.009)
      PathPoint skull_point: skull (-0.0201 0.003 -0.01)
    DynamicLigamentForce LN_spine: resting_length=0.02158564 cross_sectional_area=0.00001 toe_strain=1.05
        toe_modulus=10 linear_modulus=20 rate_scale=1.2 rate_intercept=0.01
      PathPoint spine_point: spine (-0.105 0.36 0)
      PathPoint cerv7_point: cerv7 (-0.054 0.02 0)
    DynamicLigamentForce LN_cerv7: resting_length=0.01376271 cross_sectional_area=0.00001 toe_strain=1.05
        toe_modulus=10 linear_modulus=20 rate_scale=1.2 rate_intercept=0.01
      PathPoint cerv7_point: cerv7 (-0.054 0.02 0)
      PathPoint cerv6_point: cerv6 (-0.056 0.015 0)
    DynamicLigamentForce LN_cerv6: resting_length=0.01568675 cross_sectional_area=0.00001 toe_strain=1.05
        toe_modulus=10 linear_modulus=20 rate_scale=1.2 rate_intercept=0.01
      PathPoint cerv6_point: cerv6 (-0.056 0.015 0)
      PathPoint cerv5_point: cerv5 (-0.049 0.015 0)
    DynamicLigamentForce LN_cerv5: resting_length=0.0125721 cross_sectional_area=0.00001 toe_strain=1.05 toe_modulus=10
        linear_modulus=20 rate_scale=1.2 rate_intercept=0.01
      PathPoint cerv5_point: cerv5 (-0.049 0.015 0)
      PathPoint cerv4_point: cerv4 (-0.045 0.01 0)
    DynamicLigamentForce LN_cerv4: resting_length=0.01350926 cross_sectional_area=0.00001 toe_strain=1.05
        toe_modulus=10 linear_modulus=20 rate_scale=1.2 rate_intercept=0.01
      PathPoint cerv4_point: cerv4 (-0.045 0.01 0)
      PathPoint cerv3_point: cerv3 (-0.044 0.005 0)
    DynamicLigamentForce LN_cerv3: resting_length=0.01409035 cross_sectional_area=0.00001 toe_strain=1.05
        toe_modulus=10 linear_modulus=20 rate_scale=1.2 rate_intercept=0.01
      PathPoint cerv3_point: cerv3 (-0.044 0.005 0)
      PathPoint cerv2_point: cerv2 (-0.044 0.005 0)
    DynamicLigamentForce LN_cerv2: resting_length=0.02296327 cross_sectional_area=0.00001 toe_strain=1.05
        toe_modulus=10 linear_modulus=20 rate_scale=1.2 rate_intercept=0.01
      PathPoint cerv2_point: cerv2 (-0.044 0.005 0)
      PathPoint cerv1_point: cerv1 (-0.05 -0.005 0)
    DynamicLigamentForce LN_cerv1: resting_length=0.04004959 cross_sectional_area=0.00001 toe_strain=1.05
        toe_modulus=10 linear_modulus=20 rate_scale=1.2 rate_intercept=0.01
      PathPoint cerv1_point: cerv1 (-0.05 -0.005 0)
      PathPoint skull_point: skull (-0.0601 0.017 0)
    Millard2012EquilibriumMuscle [values shared by the 98 below unless stated]:
      ActiveForceLengthCurve: min_norm_active_fiber_length=0.4441 transition_norm_fiber_length=0.73
          max_norm_active_fiber_length=1.8123 shallow_ascending_slope=0.8616 minimum_value=0
      ForceVelocityCurve: concentric_slope_at_vmax=0 concentric_slope_near_vmax=0.25 isometric_slope=5
          eccentric_slope_at_vmax=0 eccentric_slope_near_vmax=0.15 max_eccentric_velocity_force_multiplier=1.4
          concentric_curviness=0.6 eccentric_curviness=0.9
      FiberForceLengthCurve
      TendonForceLengthCurve
    Millard2012EquilibriumMuscle stern_mast_r: max_isometric_force=68.95 optimal_fiber_length=0.108
        tendon_slack_length=0.056123 pennation_angle_at_optimal=0.2617994 [radians] minimum_activation=0.01
      PathPoint stern_mast-P1: spine (-0.0007 0.3269 0.0096)
      PathPoint stern_mast-P2: skull (0.0078 0.00693 0.0643)
      PathWrap: wrap_object=SCM_wrap method=hybrid
    Millard2012EquilibriumMuscle cleid_mas_r: max_isometric_force=34.475 optimal_fiber_length=0.108
        tendon_slack_length=0.035198 pennation_angle_at_optimal=0.2617994 minimum_activation=0.01
      PathPoint cleid_mast-P1: spine (-0.0031 0.3407 0.0563)
      PathPoint cleid_mast-P2: skull (0.0078 0.00693 0.0643)
      PathWrap: wrap_object=SCM_wrap method=hybrid
    Millard2012EquilibriumMuscle cleid_occ_r: max_isometric_force=34.475 optimal_fiber_length=0.108
        tendon_slack_length=0.069467 pennation_angle_at_optimal=0.2617994 minimum_activation=0.01
      PathPoint cleid_occ-P1: spine (-0.0031 0.3407 0.0563)
      PathPoint cleid_occ-P2: skull (-0.0221 0.023 0.0664)
      PathWrap: wrap_object=SCM_wrap method=hybrid
    Millard2012EquilibriumMuscle scalenus_ant_r: max_isometric_force=51.45 optimal_fiber_length=0.042
        tendon_slack_length=0.053421 pennation_angle_at_optimal=0.1745329 minimum_activation=0.01
      PathPoint scalenus_ant-P1: spine (-0.02139 0.33246 0.0529)
      PathPoint scalenus_ant-P2: cerv4 (0.00211 0.01962 0.02323)
    Millard2012EquilibriumMuscle scalenus_med_r: max_isometric_force=72.1 optimal_fiber_length=0.05
        tendon_slack_length=0.061508 pennation_angle_at_optimal=0.1745329 minimum_activation=0.01
      PathPoint scalenus_med-P1: spine (-0.03398 0.34333 0.0627)
      PathPoint scalenus_med-P2: cerv3 (-0.01373 0.01883 0.02119)
    Millard2012EquilibriumMuscle scalenus_post_r: max_isometric_force=54.95 optimal_fiber_length=0.062
        tendon_slack_length=0.072845 pennation_angle_at_optimal=0.1745329 minimum_activation=0.01
      PathPoint scalenus_post-P1: spine (-0.03638 0.3127 0.1062)
      PathPoint scalenus_post-P2: cerv5 (-0.00887 0.02186 0.0257)
    Millard2012EquilibriumMuscle long_cap_sklc4_r: max_isometric_force=33.32 optimal_fiber_length=0.038
        tendon_slack_length=0.041297 pennation_angle_at_optimal=0.08726646 minimum_activation=0.01
      PathPoint long_cap_sklc4-P1: cerv4 (0.0015 0.02336 0.0242)
      PathPoint long_cap_sklc4-P2: cerv3 (0.00726 0.01911 0.01897)
      PathPoint long_cap_sklc4-P3: cerv2 (0.01177 0.01952 0.01477)
      PathPoint long_cap_sklc4-P4: cerv1 (0.01573 -0.00043 0.01159)
      PathPoint long_cap_sklc4-P5: skull (0.0227 0.01596 0.0036)
    Millard2012EquilibriumMuscle long_col_c1thx_r: max_isometric_force=9.57 optimal_fiber_length=0.08913
        tendon_slack_length=0.087519 pennation_angle_at_optimal=0.08726646 minimum_activation=0.01
      PathPoint long_col_c1thx-P1: spine (-0.04888 0.30334 0.0037)
      PathPoint long_col_c1thx-P2: cerv7 (0.01636 0.006755 0.004)
      PathPoint long_col_c1thx-P3: cerv6 (0.013721 0.006375 0.00402)
      PathPoint long_col_c1thx-P4: cerv5 (0.01661 0.01043 0.0039)
      PathPoint long_col_c1thx-P5: cerv4 (0.01703 0.01503 0.00379)
      PathPoint long_col_c1thx-P6: cerv3 (0.01741 0.01505 0.00368)
      PathPoint long_col_c1thx-P7: cerv2 (0.01579 0.02096 0.00356)
      PathPoint long_col_c1thx-P8: cerv1 (0.0158 0.0013 0.0031)
    Millard2012EquilibriumMuscle long_col_c1c5_r: max_isometric_force=9.57 optimal_fiber_length=0.03592
        tendon_slack_length=0.035239 pennation_angle_at_optimal=0.08726646 minimum_activation=0.01
      PathPoint long_col_c1c5-P1: cerv5 (0.00102 0.01704 0.0238)
      PathPoint long_col_c1c5-P2: cerv4 (0.00619 0.01921 0.0207)
      PathPoint long_col_c1c5-P3: cerv2 (0.01196 0.01282 0.01365)
      PathPoint long_col_c1c5-P4: cerv1 (0.0148 0.0013 0.0062)
    Millard2012EquilibriumMuscle long_col_c5thx_r: max_isometric_force=9.57 optimal_fiber_length=0.05758
        tendon_slack_length=0.054794 pennation_angle_at_optimal=0.08726646 minimum_activation=0.01
      PathPoint long_col_c5thx-P1: spine (-0.04981 0.30296 0.0068)
      PathPoint long_col_c5thx-P2: spine (-0.04825 0.32027 0.01022)
      PathPoint long_col_c5thx-P3: spine (-0.04566 0.33463 0.01337)
      PathPoint long_col_c5thx-P4: spine (-0.04466 0.3436 0.01508)
      PathPoint long_col_c5thx-P5: spine (-0.04239 0.35783 0.01778)
      PathPoint long_col_c5thx-P6: cerv7 (0.00427 0.012965 0.01979)
      PathPoint long_col_c5thx-P7: cerv6 (0.000191 0.011195 0.02216)
      PathPoint long_col_c5thx-P8: cerv5 (0.00102 0.01704 0.0238)
    Millard2012EquilibriumMuscle trap_cl_r: max_isometric_force=77.6 optimal_fiber_length=0.084
        tendon_slack_length=0.119222 pennation_angle_at_optimal=0.5235988 minimum_activation=0.01
      PathPoint trap_cl-P1: spine (-0.0288 0.3585 0.1121)
      PathPoint trap_cl-P2: skull (-0.06741 0.02604 0.01324)
    Millard2012EquilibriumMuscle trap_acr_r: max_isometric_force=376.95 optimal_fiber_length=0.092
        tendon_slack_length=0.076582 pennation_angle_at_optimal=0 minimum_activation=0.01
      PathPoint trap_acr-P1: spine (-0.0584 0.36 0.1687)
      PathPoint trap_acr-P2: cerv7 (-0.05454 0.024655 0.00305)
    Millard2012EquilibriumMuscle splen_cap_sklc6_r: max_isometric_force=49.51 optimal_fiber_length=0.095
        tendon_slack_length=0.026013 pennation_angle_at_optimal=0 minimum_activation=0.01
      PathPoint splen_cap_sklc6-P1: cerv6 (-0.058019 0.020535 0.00305)
      PathPoint splen_cap_sklc6-P2: skull (-0.04874 0.01918 0.044)
    Millard2012EquilibriumMuscle splen_cap_sklthx_r: max_isometric_force=49.51 optimal_fiber_length=0.095
        tendon_slack_length=0.081861 pennation_angle_at_optimal=0 minimum_activation=0.01
      PathPoint splen_cap_sklthx-P1: spine (-0.10384 0.33902 0.003)
      PathPoint splen_cap_sklthx-P2: skull (-0.02726 0.011 0.05423)
    Millard2012EquilibriumMuscle splen_cerv_c3thx_r: max_isometric_force=49.51 optimal_fiber_length=0.095
        tendon_slack_length=0.108438 pennation_angle_at_optimal=0 minimum_activation=0.01
      PathPoint splen_cerv_c3thx-P1: spine (-0.12848 0.26222 0.0041)
      PathPoint splen_cerv_c3thx-P2: cerv3 (-0.01258 0.01907 0.02365)
    Millard2012EquilibriumMuscle semi_cap_sklc5_r: max_isometric_force=64.05 optimal_fiber_length=0.068
        tendon_slack_length=0.046562 pennation_angle_at_optimal=0.08726646 minimum_activation=0.01
      PathPoint semi_cap_sklc5-P1: cerv5 (-0.01498 0.01969 0.0235)
      PathPoint semi_cap_sklc5-P2: skull (-0.06151 0.02 0.018)
    Millard2012EquilibriumMuscle semi_cap_sklthx_r: max_isometric_force=64.05 optimal_fiber_length=0.068
        tendon_slack_length=0.06889 pennation_angle_at_optimal=0.08726646 minimum_activation=0.01
      PathPoint semi_cap_sklthx-P1: spine (-0.08539 0.37732 0.0347)
      PathPoint semi_cap_sklthx-P2: skull (-0.06381 0.02 0.0111)
    Millard2012EquilibriumMuscle semi_cerv_c3thx_r: max_isometric_force=64.05 optimal_fiber_length=0.068
        tendon_slack_length=0.027374 pennation_angle_at_optimal=0.08726646 minimum_activation=0.01
      PathPoint semi_cerv_c3thx-P1: spine (-0.08896 0.34997 0.02607)
      PathPoint semi_cerv_c3thx-P2: cerv3 (-0.04535 0.0058 0.0024)
    Millard2012EquilibriumMuscle levator_scap_r: max_isometric_force=76.3 optimal_fiber_length=0.113
        tendon_slack_length=0.021875 pennation_angle_at_optimal=0 minimum_activation=0.01
      PathPoint levator_scap-P1: spine (-0.1106 0.3625 0.0743)
      PathPoint levator_scap-P2: cerv2 (-0.01729 0.01848 0.02121)
    Millard2012EquilibriumMuscle longissi_cap_sklc6_r: max_isometric_force=31.18 optimal_fiber_length=0.07185
        tendon_slack_length=0.023946 pennation_angle_at_optimal=0 minimum_activation=0.01
      PathPoint longissi_cap_sklc6-P1: cerv6 (-0.017589 0.019215 0.02759)
      PathPoint longissi_cap_sklc6-P2: skull (-0.0215 0.0051 0.055)
    Millard2012EquilibriumMuscle longissi_cerv_c4thx_r: max_isometric_force=20.05 optimal_fiber_length=0.131813
        tendon_slack_length=0.042329 pennation_angle_at_optimal=0 minimum_activation=0.01
      PathPoint longissi_cerv_c4thx-P1: spine (-0.10994 0.27586 0.03215)
      PathPoint longissi_cerv_c4thx-P2: spine (-0.10918 0.30238 0.03041)
      PathPoint longissi_cerv_c4thx-P3: spine (-0.09978 0.32692 0.02919)
      PathPoint longissi_cerv_c4thx-P4: spine (-0.0813 0.373 0.0279)
      PathPoint longissi_cerv_c4thx-P5: cerv4 (-0.01211 0.02329 0.0261)
    Millard2012EquilibriumMuscle iliocost_cerv_c5rib_r: max_isometric_force=20.05 optimal_fiber_length=0.080895
        tendon_slack_length=0.025706 pennation_angle_at_optimal=0 minimum_activation=0.01
      PathPoint iliocost_cerv_c5rib-P1: spine (-0.10349 0.32797 0.0533)
      PathPoint iliocost_cerv_c5rib-P2: spine (-0.08374 0.37638 0.04035)
      PathPoint iliocost_cerv_c5rib-P3: cerv5 (-0.01507 0.02073 0.026)
    Millard2012EquilibriumMuscle rectcap_post_maj_r: max_isometric_force=32.62 optimal_fiber_length=0.037
        tendon_slack_length=0.022832 pennation_angle_at_optimal=0.08726646 minimum_activation=0.01
      PathPoint rectcap_post_maj-P1: cerv2 (-0.0418 0.00476 0.0024)
      PathPoint rectcap_post_maj-P2: skull (-0.0475 0.009 0.023)
    Millard2012EquilibriumMuscle rectcap_post_min_r: max_isometric_force=17.92 optimal_fiber_length=0.019
        tendon_slack_length=0.016897 pennation_angle_at_optimal=0.08726646 minimum_activation=0.01
      PathPoint rectcap_post_min-P1: cerv1 (-0.04238 -0.00262 0.0061)
      PathPoint rectcap_post_min-P2: skull (-0.0538 0.009 0.0145)
    Millard2012EquilibriumMuscle obl_cap_sup_r: max_isometric_force=36.505 optimal_fiber_length=0.025
        tendon_slack_length=0.020417 pennation_angle_at_optimal=0.1745329 minimum_activation=0.01
      PathPoint obl_cap_sup-P1: cerv1 (-0.0074 0.00033 0.042)
      PathPoint obl_cap_sup-P2: skull (-0.03468 0.00931 0.03818)
    Millard2012EquilibriumMuscle obl_cap_inf_r: max_isometric_force=45.29 optimal_fiber_length=0.038
        tendon_slack_length=0.015607 pennation_angle_at_optimal=0 minimum_activation=0.01
      PathPoint obl_cap_inf-P1: cerv2 (-0.0418 0.00476 0.00547)
      PathPoint obl_cap_inf-P2: cerv1 (-0.01249 -0.00003 0.03791)
    Millard2012EquilibriumMuscle supmult-C4/5-C2_r: max_isometric_force=14.14 optimal_fiber_length=0.024
        tendon_slack_length=0.0215 pennation_angle_at_optimal=0 minimum_activation=0.01
      PathPoint supmult-C4/5-C2-P1: cerv2 (-0.03844 -0.00012 0.00489)
      PathPoint supmult-C4/5-C2-P2: cerv5 (-0.01908 0.02809 0.02297)
    Millard2012EquilibriumMuscle supmult-C5/6-C2_r: max_isometric_force=22.18 optimal_fiber_length=0.0245
        tendon_slack_length=0.0286 pennation_angle_at_optimal=0 minimum_activation=0.01
      PathPoint supmult-C5/6-C2-P1: cerv2 (-0.03938 0.00074 0.00471)
      PathPoint supmult-C5/6-C2-P2: cerv6 (-0.020969 0.024845 0.02512)
    Millard2012EquilibriumMuscle supmult-C6/7-C2_r: max_isometric_force=18.79 optimal_fiber_length=0.0273
        tendon_slack_length=0.0322 pennation_angle_at_optimal=0 minimum_activation=0.01
      PathPoint supmult-C6/7-C2-P1: cerv2 (-0.03941 0.00077 0.0047)
      PathPoint supmult-C6/7-C2-P2: cerv7 (-0.01901 0.026765 0.02668)
    Millard2012EquilibriumMuscle supmult-T1-C4_r: max_isometric_force=64.05 optimal_fiber_length=0.068
        tendon_slack_length=0.02737 pennation_angle_at_optimal=0.08726646 minimum_activation=0.01
      PathPoint supmult-T1-C4-P1: cerv4 (-0.03543 0.01253 0.00449)
      PathPoint supmult-T1-C4-P2: spine (-0.08373 0.37355 0.03185)
    Millard2012EquilibriumMuscle supmult-T1-C5_r: max_isometric_force=64.05 optimal_fiber_length=0.068
        tendon_slack_length=0.02737 pennation_angle_at_optimal=0.08726646 minimum_activation=0.01
      PathPoint supmult-T1-C5-P1: cerv5 (-0.04116 0.01798 0.00507)
      PathPoint supmult-T1-C5-P2: spine (-0.08255 0.37138 0.02985)
    Millard2012EquilibriumMuscle supmult-T2-C6_r: max_isometric_force=64.05 optimal_fiber_length=0.068
        tendon_slack_length=0.02737 pennation_angle_at_optimal=0.08726646 minimum_activation=0.01
      PathPoint supmult-T2-C6-P1: cerv6 (-0.046459 0.015195 0.00491)
      PathPoint supmult-T2-C6-P2: spine (-0.08879 0.3513 0.02764)
    Millard2012EquilibriumMuscle deepmult-C4/5-C2_r: max_isometric_force=7.15 optimal_fiber_length=0.0203
        tendon_slack_length=0.0152 pennation_angle_at_optimal=0 minimum_activation=0.01
      PathPoint deepmult-C4/5-C2-P1: cerv2 (-0.02632 0.00626 0.00599)
      PathPoint deepmult-C4/5-C2-P2: cerv5 (-0.01884 0.0284 0.02096)
    Millard2012EquilibriumMuscle deepmult-C5/6-C3_r: max_isometric_force=12.54 optimal_fiber_length=0.0185
        tendon_slack_length=0.017 pennation_angle_at_optimal=0 minimum_activation=0.01
      PathPoint deepmult-C5/6-C3-P1: cerv3 (-0.02607 0.00578 0.00611)
      PathPoint deepmult-C5/6-C3-P2: cerv6 (-0.021009 0.025095 0.0236)
    Millard2012EquilibriumMuscle deepmult-C6/7-C4_r: max_isometric_force=18.31 optimal_fiber_length=0.017
        tendon_slack_length=0.0174 pennation_angle_at_optimal=0 minimum_activation=0.01
      PathPoint deepmult-C6/7-C4-P1: cerv4 (-0.02663 0.01156 0.0065)
      PathPoint deepmult-C6/7-C4-P2: cerv7 (-0.01962 0.026685 0.02508)
    Millard2012EquilibriumMuscle deepmult-T1-C5_r: max_isometric_force=64.05 optimal_fiber_length=0.068
        tendon_slack_length=0.02737 pennation_angle_at_optimal=0.08726646 minimum_activation=0.01
      PathPoint deepmult-T1-C5-P1: cerv5 (-0.03348 0.01827 0.00578)
      PathPoint deepmult-T1-C5-P2: spine (-0.08304 0.37409 0.03082)
    Millard2012EquilibriumMuscle deepmult-T1-C6_r: max_isometric_force=64.05 optimal_fiber_length=0.068
        tendon_slack_length=0.02737 pennation_angle_at_optimal=0.08726646 minimum_activation=0.01
      PathPoint deepmult-T1-C6-P1: cerv6 (-0.036979 0.014875 0.00579)
      PathPoint deepmult-T1-C6-P2: spine (-0.08201 0.37089 0.02898)
    Millard2012EquilibriumMuscle deepmult-T2-C7_r: max_isometric_force=64.05 optimal_fiber_length=0.068
        tendon_slack_length=0.02737 pennation_angle_at_optimal=0.08726646 minimum_activation=0.01
      PathPoint deepmult-T2-C7-P1: cerv7 (-0.03381 0.017895 0.00579)
      PathPoint deepmult-T2-C7-P2: spine (-0.08885 0.35108 0.02771)
    Millard2012EquilibriumMuscle deepmult-T2-T1_r: max_isometric_force=64.05 optimal_fiber_length=0.068
        tendon_slack_length=0.02737 pennation_angle_at_optimal=0.08726646 minimum_activation=0.01
      PathPoint deepmult-T2-T1-P1: spine (-0.08711 0.34913 0.02455)
      PathPoint deepmult-T2-T1-P2: spine (-0.08485 0.35049 0.00389)
    Millard2012EquilibriumMuscle digastric_post_r: max_isometric_force=40.6 optimal_fiber_length=0.0205
        tendon_slack_length=0.034134 pennation_angle_at_optimal=0.2496 minimum_activation=0.01
      PathPoint digastric post-P1: skull (0.0068 0.0034 0.0477)
      PathPoint digastric post-P2: cerv3 (0.0185 0.01499001 0.0287)
    Millard2012EquilibriumMuscle digastric_ant_r: max_isometric_force=40.6 optimal_fiber_length=0.0142
        tendon_slack_length=0.005 pennation_angle_at_optimal=0 minimum_activation=0.01
      PathPoint digastric post-P1: skull (0.0432 -0.0643 0.0173)
      PathPoint digastric post-P2: cerv1 (0.03044 -0.0611 0.0057)
    Millard2012EquilibriumMuscle Geniohyoid_r: max_isometric_force=33.95 optimal_fiber_length=0.0343
        tendon_slack_length=0.00542 pennation_angle_at_optimal=0 minimum_activation=0.01
      PathPoint digastric post-P1: cerv1 (0.0305 -0.0566 0.0057)
      PathPoint digastric post-P2: skull (0.082 -0.0673 0.0016)
    Millard2012EquilibriumMuscle Mylohyoid_Post_r: max_isometric_force=18.55 optimal_fiber_length=0.0282
        tendon_slack_length=0.01401339 pennation_angle_at_optimal=0 minimum_activation=0.01
      PathPoint digastric post-P1: cerv1 (0.0328 -0.0594 0.0031)
      PathPoint digastric post-P2: skull (0.0542 -0.0389 0.0291)
    Millard2012EquilibriumMuscle Mylohyoid_Ant_r: max_isometric_force=55.65 optimal_fiber_length=0.02
        tendon_slack_length=0.00274 pennation_angle_at_optimal=0 default_fiber_length=0.1 minimum_activation=0.01
      PathPoint digastric post-P1: cerv1 (0.0548 -0.0602 -0.0031)
      PathPoint digastric post-P2: skull (0.0708 -0.0596 0.0158)
    Millard2012EquilibriumMuscle Stylohyoid_Lat_r: max_isometric_force=6.825 optimal_fiber_length=0.0182
        tendon_slack_length=0.04955 pennation_angle_at_optimal=0.082 minimum_activation=0.01
      PathPoint digastric post-P1: skull (0.0242 -0.0008 0.0376)
      PathPoint digastric post-P2: cerv1 (0.0228 -0.0527 0.0159)
    Millard2012EquilibriumMuscle Stylohyoid_Med_r: max_isometric_force=6.825 optimal_fiber_length=0.0182
        tendon_slack_length=0.04362451 pennation_angle_at_optimal=0.08203 minimum_activation=0.01
      PathPoint digastric post-P1: skull (0.0247 -0.002 0.0376)
      PathPoint digastric post-P2: cerv1 (0.0216 -0.0481 0.0167)
    Millard2012EquilibriumMuscle Sterno_hyoid_r: max_isometric_force=20.3 optimal_fiber_length=0.0742
        tendon_slack_length=0.0318 pennation_angle_at_optimal=0 minimum_activation=0.01
      PathPoint stern_mast-P1: cerv3 (0.05271 -0.01412 0.00629)
      PathPoint default: spine (-0.014033 0.31252 0.01984)
    Millard2012EquilibriumMuscle SternoThyroid_r: max_isometric_force=22.75 optimal_fiber_length=0.06195
        tendon_slack_length=0.02655 pennation_angle_at_optimal=0 minimum_activation=0.01
      PathPoint stern_mast-P1: cerv3 (0.0357101 -0.03414 0.0133)
      PathPoint default: spine (-0.014643 0.30575 0.0153)
    Millard2012EquilibriumMuscle Omo_hyoid_r: max_isometric_force=26.25 optimal_fiber_length=0.04585
        tendon_slack_length=0.01965 pennation_angle_at_optimal=0 minimum_activation=0.01
      PathPoint stern_mast-P1: cerv3 (0.04741 -0.00488 0.0132)
      PathPoint default: spine (-0.021033 0.37083 0.03774)
    Millard2012EquilibriumMuscle stern_mast_l: max_isometric_force=68.95 optimal_fiber_length=0.108
        tendon_slack_length=0.056123 pennation_angle_at_optimal=0.2617994 minimum_activation=0.01
      PathPoint stern_mast_L-P1: spine (-0.0007 0.3269 -0.0096)
      PathPoint stern_mast_L-P2: skull (0.0078 0.00693 -0.0643)
      PathWrap: wrap_object=SCM_wrap method=hybrid
    Millard2012EquilibriumMuscle cleid_mast_l: max_isometric_force=34.475 optimal_fiber_length=0.108
        tendon_slack_length=0.035198 pennation_angle_at_optimal=0.2617994 minimum_activation=0.01
      PathPoint cleid_mast_L-P1: spine (-0.0031 0.3407 -0.0563)
      PathPoint cleid_mast_L-P2: skull (0.0078 0.00693 -0.0643)
      PathWrap: wrap_object=SCM_wrap method=hybrid
    Millard2012EquilibriumMuscle cleid_occ_l: max_isometric_force=34.475 optimal_fiber_length=0.108
        tendon_slack_length=0.069467 pennation_angle_at_optimal=0.2617994 minimum_activation=0.01
      PathPoint cleid_occ_L-P1: spine (-0.0031 0.3407 -0.0563)
      PathPoint cleid_occ_L-P2: skull (-0.0221 0.023 -0.0664)
      PathWrap: wrap_object=SCM_wrap method=hybrid
    Millard2012EquilibriumMuscle scalenus_ant_l: max_isometric_force=51.45 optimal_fiber_length=0.042
        tendon_slack_length=0.053421 pennation_angle_at_optimal=0.1745329 minimum_activation=0.01
      PathPoint scalenus_ant_L-P1: spine (-0.02139 0.33246 -0.0529)
      PathPoint scalenus_ant-P2: cerv4 (0.00211 0.01962 -0.02323)
    Millard2012EquilibriumMuscle scalenus_med_l: max_isometric_force=72.1 optimal_fiber_length=0.05
        tendon_slack_length=0.061508 pennation_angle_at_optimal=0.1745329 minimum_activation=0.01
      PathPoint scalenus_med_L-P1: spine (-0.03398 0.34333 -0.0627)
      PathPoint scalenus_med-P2: cerv3 (-0.01373 0.01883 -0.02119)
    Millard2012EquilibriumMuscle scalenus_post_l: max_isometric_force=54.95 optimal_fiber_length=0.062
        tendon_slack_length=0.072845 pennation_angle_at_optimal=0.1745329 minimum_activation=0.01
      PathPoint scalenus_post_L-P1: spine (-0.03638 0.3127 -0.1062)
      PathPoint scalenus_post-P2: cerv5 (-0.00887 0.02186 -0.0257)
    Millard2012EquilibriumMuscle long_cap_sklc4_l: max_isometric_force=33.32 optimal_fiber_length=0.038
        tendon_slack_length=0.041297 pennation_angle_at_optimal=0.08726646 minimum_activation=0.01
      PathPoint long_cap_sklc4-P1: cerv4 (0.0015 0.02336 -0.0242)
      PathPoint long_cap_sklc4-P2: cerv3 (0.00726 0.01911 -0.01897)
      PathPoint long_cap_sklc4-P3: cerv2 (0.01177 0.01952 -0.01477)
      PathPoint long_cap_sklc4_L-P4: cerv1 (0.01573 -0.00043 -0.01159)
      PathPoint long_cap_sklc4_L-P5: skull (0.0227 0.01596 -0.0036)
    Millard2012EquilibriumMuscle long_col_c1thx_l: max_isometric_force=9.57 optimal_fiber_length=0.08913
        tendon_slack_length=0.087519 pennation_angle_at_optimal=0.08726646 minimum_activation=0.01
      PathPoint long_col_c1thx_L-P1: spine (-0.04888 0.30334 -0.0037)
      PathPoint long_col_c1thx-P2: cerv7 (0.01636 0.006755 -0.004)
      PathPoint long_col_c1thx-P3: cerv6 (0.013721 0.006375 -0.00402)
      PathPoint long_col_c1thx-P4: cerv5 (0.01661 0.01043 -0.0039)
      PathPoint long_col_c1thx-P5: cerv4 (0.01703 0.01503 -0.00379)
      PathPoint long_col_c1thx-P6: cerv3 (0.01741 0.01505 -0.00368)
      PathPoint long_col_c1thx-P7: cerv2 (0.01579 0.02096 -0.00356)
      PathPoint long_col_c1thx_L-P8: cerv1 (0.0158 0.0013 -0.0031)
    Millard2012EquilibriumMuscle long_col_c1c5_l: max_isometric_force=9.57 optimal_fiber_length=0.03592
        tendon_slack_length=0.035239 pennation_angle_at_optimal=0.08726646 minimum_activation=0.01
      PathPoint long_col_c1c5-P1: cerv5 (0.00102 0.01704 -0.0238)
      PathPoint long_col_c1c5-P2: cerv4 (0.00619 0.01921 -0.0207)
      PathPoint long_col_c1c5-P3: cerv2 (0.01196 0.01282 -0.01365)
      PathPoint long_col_c1c5_L-P4: cerv1 (0.0148 0.0013 -0.0062)
    Millard2012EquilibriumMuscle long_col_c5thx_l: max_isometric_force=9.57 optimal_fiber_length=0.05758
        tendon_slack_length=0.054794 pennation_angle_at_optimal=0.08726646 minimum_activation=0.01
      PathPoint long_col_c5thx_L-P1: spine (-0.04981 0.30296 -0.0068)
      PathPoint long_col_c5thx_L-P2: spine (-0.04825 0.32027 -0.01022)
      PathPoint long_col_c5thx_L-P3: spine (-0.04566 0.33463 0)
      PathPoint long_col_c5thx_L-P4: spine (-0.04466 0.3436 -0.01508)
      PathPoint long_col_c5thx_L-P5: spine (-0.04239 0.35783 -0.01778)
      PathPoint long_col_c5thx-P6: cerv7 (0.00427 0.012965 -0.01979)
      PathPoint long_col_c5thx-P7: cerv6 (0.000191 0.011195 -0.02216)
      PathPoint long_col_c5thx-P8: cerv5 (0.00102 0.01704 -0.0238)
    Millard2012EquilibriumMuscle trap_cl_l: max_isometric_force=77.6 optimal_fiber_length=0.084
        tendon_slack_length=0.119222 pennation_angle_at_optimal=0.5235988 minimum_activation=0.01
      PathPoint trap_cl_L-P1: spine (-0.0288 0.3585 -0.1121)
      PathPoint trap_cl-P2: skull (-0.06741 0.02604 -0.01324)
    Millard2012EquilibriumMuscle trap_acr_l: max_isometric_force=376.95 optimal_fiber_length=0.092
        tendon_slack_length=0.076582 pennation_angle_at_optimal=0 minimum_activation=0.01
      PathPoint trap_acr_L-P1: spine (-0.0584 0.36 -0.1687)
      PathPoint trap_acr-P2: cerv7 (-0.05454 0.024655 -0.00305)
    Millard2012EquilibriumMuscle splen_cap_sklc6_l: max_isometric_force=49.51 optimal_fiber_length=0.095
        tendon_slack_length=0.026013 pennation_angle_at_optimal=0 minimum_activation=0.01
      PathPoint splen_cap_sklc6-P1: cerv6 (-0.058019 0.020535 -0.00305)
      PathPoint splen_cap_sklc6_L-P2: skull (-0.04874 0.01918 -0.044)
    Millard2012EquilibriumMuscle splen_cap_sklthx_l: max_isometric_force=49.51 optimal_fiber_length=0.095
        tendon_slack_length=0.081861 pennation_angle_at_optimal=0 minimum_activation=0.01
      PathPoint splen_cap_sklthx_L-P1: spine (-0.10384 0.33902 -0.003)
      PathPoint splen_cap_sklthx_L-P2: skull (-0.02726 0.011 -0.05423)
    Millard2012EquilibriumMuscle splen_cerv_c3thx_l: max_isometric_force=49.51 optimal_fiber_length=0.095
        tendon_slack_length=0.108438 pennation_angle_at_optimal=0 minimum_activation=0.01
      PathPoint splen_cerv_c3thx_L-P1: spine (-0.12848 0.26222 -0.0041)
      PathPoint splen_cerv_c3thx-P2: cerv3 (-0.01258 0.01907 -0.02365)
    Millard2012EquilibriumMuscle semi_cap_sklc5_l: max_isometric_force=64.05 optimal_fiber_length=0.068
        tendon_slack_length=0.046562 pennation_angle_at_optimal=0.08726646 minimum_activation=0.01
      PathPoint semi_cap_sklc5-P1: cerv5 (-0.01498 0.01969 -0.0235)
      PathPoint semi_cap_sklc5_L-P2: skull (-0.06151 0.02 -0.018)
    Millard2012EquilibriumMuscle semi_cap_sklthx_l: max_isometric_force=64.05 optimal_fiber_length=0.068
        tendon_slack_length=0.06889 pennation_angle_at_optimal=0.08726646 minimum_activation=0.01
      PathPoint semi_cap_sklthx_L-P1: spine (-0.08539 0.37732 -0.0347)
      PathPoint semi_cap_sklthx_L-P2: skull (-0.06381 0.02 -0.0111)
    Millard2012EquilibriumMuscle semi_cerv_c3thx_l: max_isometric_force=64.05 optimal_fiber_length=0.068
        tendon_slack_length=0.027374 pennation_angle_at_optimal=0.08726646 minimum_activation=0.01
      PathPoint semi_cerv_c3thx_L-P1: spine (-0.08896 0.34997 -0.02607)
      PathPoint semi_cerv_c3thx-P2: cerv3 (-0.04535 0.0058 -0.0024)
    Millard2012EquilibriumMuscle levator_scap_l: max_isometric_force=76.3 optimal_fiber_length=0.113
        tendon_slack_length=0.021875 pennation_angle_at_optimal=0 minimum_activation=0.01
      PathPoint levator_scap_L-P1: spine (-0.1106 0.3625 -0.0743)
      PathPoint levator_scap-P2: cerv2 (-0.01729 0.01848 -0.02121)
    Millard2012EquilibriumMuscle longissi_cap_sklc6_l: max_isometric_force=31.18 optimal_fiber_length=0.07185
        tendon_slack_length=0.023946 pennation_angle_at_optimal=0 minimum_activation=0.01
      PathPoint longissi_cap_sklc6-P1: cerv6 (-0.017589 0.019215 -0.02759)
      PathPoint longissi_cap_sklc6_L-P2: skull (-0.0215 0.0051 -0.055)
    Millard2012EquilibriumMuscle longissi_cerv_c4thx_l: max_isometric_force=20.05 optimal_fiber_length=0.131813
        tendon_slack_length=0.042329 pennation_angle_at_optimal=0 minimum_activation=0.01
      PathPoint longissi_cerv_c4thx_L-P1: spine (-0.10994 0.27586 -0.03215)
      PathPoint longissi_cerv_c4thx_L-P2: spine (-0.10918 0.30238 -0.03041)
      PathPoint longissi_cerv_c4thx_L-P3: spine (-0.09978 0.32692 -0.02919)
      PathPoint longissi_cerv_c4thx_L-P4: spine (-0.0813 0.373 -0.0279)
      PathPoint longissi_cerv_c4thx-P5: cerv4 (-0.01211 0.02329 -0.0261)
    Millard2012EquilibriumMuscle iliocost_cerv_c5rib_l: max_isometric_force=20.05 optimal_fiber_length=0.080895
        tendon_slack_length=0.025706 pennation_angle_at_optimal=0 minimum_activation=0.01
      PathPoint iliocost_cerv_c5rib_L-P1: spine (-0.10349 0.32797 -0.0533)
      PathPoint iliocost_cerv_c5rib_L-P2: spine (-0.08374 0.37638 -0.04035)
      PathPoint iliocost_cerv_c5rib-P3: cerv5 (-0.01507 0.02073 -0.026)
    Millard2012EquilibriumMuscle rectcap_post_maj_l: max_isometric_force=32.62 optimal_fiber_length=0.037
        tendon_slack_length=0.022832 pennation_angle_at_optimal=0.08726646 minimum_activation=0.01
      PathPoint rectcap_post_maj-P1: cerv2 (-0.0418 0.00476 -0.0024)
      PathPoint rectcap_post_maj_L-P2: skull (-0.0475 0.009 -0.023)
    Millard2012EquilibriumMuscle rectcap_post_min_l: max_isometric_force=17.92 optimal_fiber_length=0.019
        tendon_slack_length=0.016897 pennation_angle_at_optimal=0.08726646 minimum_activation=0.01
      PathPoint rectcap_post_min_L-P1: cerv1 (-0.04238 -0.00262 -0.0061)
      PathPoint rectcap_post_min_L-P2: skull (-0.0538 0.009 -0.0145)
    Millard2012EquilibriumMuscle obl_cap_sup_l: max_isometric_force=36.505 optimal_fiber_length=0.025
        tendon_slack_length=0.020417 pennation_angle_at_optimal=0.1745329 minimum_activation=0.01
      PathPoint obl_cap_sup_L-P1: cerv1 (-0.0074 0.00033 -0.042)
      PathPoint obl_cap_sup_L-P2: skull (-0.03468 0.00931 -0.03818)
    Millard2012EquilibriumMuscle obl_cap_inf_l: max_isometric_force=45.29 optimal_fiber_length=0.038
        tendon_slack_length=0.015607 pennation_angle_at_optimal=0 minimum_activation=0.01
      PathPoint obl_cap_inf-P1: cerv2 (-0.0418 0.00476 -0.00547)
      PathPoint obl_cap_inf_L-P2: cerv1 (-0.01249 -0.00003 -0.03791)
    Millard2012EquilibriumMuscle supmult-C4/5-C2_l: max_isometric_force=14.14 optimal_fiber_length=0.024
        tendon_slack_length=0.0215 pennation_angle_at_optimal=0 minimum_activation=0.01
      PathPoint supmult-C4/5-C2-P1: cerv2 (-0.03844 -0.00012 -0.00489)
      PathPoint supmult-C4/5-C2-P2: cerv5 (-0.01908 0.02809 -0.02297)
    Millard2012EquilibriumMuscle supmult-C5/6-C2_l: max_isometric_force=22.18 optimal_fiber_length=0.0245
        tendon_slack_length=0.0286 pennation_angle_at_optimal=0 minimum_activation=0.01
      PathPoint supmult-C5/6-C2-P1: cerv2 (-0.03938 0.00074 -0.00471)
      PathPoint supmult-C5/6-C2-P2: cerv6 (-0.020969 0.024845 -0.02512)
    Millard2012EquilibriumMuscle supmult-C6/7-C2_l: max_isometric_force=18.79 optimal_fiber_length=0.0273
        tendon_slack_length=0.0322 pennation_angle_at_optimal=0 minimum_activation=0.01
      PathPoint supmult-C6/7-C2-P1: cerv2 (-0.03941 0.00077 -0.0047)
      PathPoint supmult-C6/7-C2-P2: cerv7 (-0.01901 0.026765 -0.02668)
    Millard2012EquilibriumMuscle supmult-T1-C4_l: max_isometric_force=64.05 optimal_fiber_length=0.068
        tendon_slack_length=0.02737 pennation_angle_at_optimal=0.08726646 minimum_activation=0.01
      PathPoint supmult-T1-C4-P1: cerv4 (-0.03543 0.01253 -0.00449)
      PathPoint supmult-T1-C4_L-P2: spine (-0.08373 0.37355 -0.03185)
    Millard2012EquilibriumMuscle supmult-T1-C5_l: max_isometric_force=64.05 optimal_fiber_length=0.068
        tendon_slack_length=0.02737 pennation_angle_at_optimal=0.08726646 minimum_activation=0.01
      PathPoint supmult-T1-C5-P1: cerv5 (-0.04116 0.01798 -0.00507)
      PathPoint supmult-T1-C5_L-P2: spine (-0.08255 0.37138 -0.02985)
    Millard2012EquilibriumMuscle supmult-T2-C6_l: max_isometric_force=64.05 optimal_fiber_length=0.068
        tendon_slack_length=0.02737 pennation_angle_at_optimal=0.08726646 minimum_activation=0.01
      PathPoint supmult-T2-C6-P1: cerv6 (-0.046459 0.015195 -0.00491)
      PathPoint supmult-T2-C6_L-P2: spine (-0.08879 0.3513 -0.02764)
    Millard2012EquilibriumMuscle deepmult-C4/5-C2_l: max_isometric_force=7.15 optimal_fiber_length=0.0203
        tendon_slack_length=0.0152 pennation_angle_at_optimal=0 minimum_activation=0.01
      PathPoint deepmult-C4/5-C2-P1: cerv2 (-0.02632 0.00626 -0.00599)
      PathPoint deepmult-C4/5-C2-P2: cerv5 (-0.01884 0.0284 -0.02096)
    Millard2012EquilibriumMuscle deepmult-C5/6-C3_l: max_isometric_force=12.54 optimal_fiber_length=0.0185
        tendon_slack_length=0.017 pennation_angle_at_optimal=0 minimum_activation=0.01
      PathPoint deepmult-C5/6-C3-P1: cerv3 (-0.02607 0.00578 -0.00611)
      PathPoint deepmult-C5/6-C3-P2: cerv6 (-0.021009 0.025095 -0.0236)
    Millard2012EquilibriumMuscle deepmult-C6/7-C4_l: max_isometric_force=18.31 optimal_fiber_length=0.017
        tendon_slack_length=0.0174 pennation_angle_at_optimal=0 minimum_activation=0.01
      PathPoint deepmult-C6/7-C4-P1: cerv4 (-0.02663 0.01156 -0.0065)
      PathPoint deepmult-C6/7-C4-P2: cerv7 (-0.01962 0.026685 -0.02508)
    Millard2012EquilibriumMuscle deepmult-T1-C5_l: max_isometric_force=64.05 optimal_fiber_length=0.068
        tendon_slack_length=0.02737 pennation_angle_at_optimal=0.08726646 minimum_activation=0.01
      PathPoint deepmult-T1-C5-P1: cerv5 (-0.03348 0.01827 -0.00578)
      PathPoint deepmult-T1-C5_L-P2: spine (-0.08304 0.37409 -0.03082)
    Millard2012EquilibriumMuscle deepmult-T1-C6_l: max_isometric_force=64.05 optimal_fiber_length=0.068
        tendon_slack_length=0.02737 pennation_angle_at_optimal=0.08726646 minimum_activation=0.01
      PathPoint deepmult-T1-C6-P1: cerv6 (-0.036979 0.014875 -0.00579)
      PathPoint deepmult-T1-C6_L-P2: spine (-0.08201 0.37089 -0.02898)
    Millard2012EquilibriumMuscle deepmult-T2-C7_l: max_isometric_force=64.05 optimal_fiber_length=0.068
        tendon_slack_length=0.02737 pennation_angle_at_optimal=0.08726646 minimum_activation=0.01
      PathPoint deepmult-T2-C7-P1: cerv7 (-0.03381 0.017895 -0.00579)
      PathPoint deepmult-T2-C7_L-P2: spine (-0.08885 0.35108 -0.02771)
    Millard2012EquilibriumMuscle deepmult-T2-T1_l: max_isometric_force=64.05 optimal_fiber_length=0.068
        tendon_slack_length=0.02737 pennation_angle_at_optimal=0.08726646 minimum_activation=0.01
      PathPoint deepmult-T2-T1_L-P1: spine (-0.08711 0.34913 -0.02455)
      PathPoint deepmult-T2-T1_L-P2: spine (-0.08485 0.35049 -0.00389)
    Millard2012EquilibriumMuscle digastric_post_l: max_isometric_force=40.6 optimal_fiber_length=0.0205
        tendon_slack_length=0.034134 pennation_angle_at_optimal=0.2496 minimum_activation=0.01
      PathPoint digastric post-P1: skull (0.0068 0.0034 -0.0477)
      PathPoint digastric post-P2: cerv3 (0.0185 0.01499001 -0.0287)
    Millard2012EquilibriumMuscle digastric_ant_l: max_isometric_force=40.6 optimal_fiber_length=0.0142
        tendon_slack_length=0.005 pennation_angle_at_optimal=0 minimum_activation=0.01
      PathPoint digastric post-P1: skull (0.0432 -0.0643 -0.0173)
      PathPoint digastric post-P2: cerv1 (0.03044 -0.0611 -0.0057)
    Millard2012EquilibriumMuscle Geniohyoid_l: max_isometric_force=33.95 optimal_fiber_length=0.0343
        tendon_slack_length=0.00542 pennation_angle_at_optimal=0 minimum_activation=0.01
      PathPoint digastric post-P1: cerv1 (0.0305 -0.0566 -0.0057)
      PathPoint digastric post-P2: skull (0.082 -0.0673 -0.0016)
    Millard2012EquilibriumMuscle Mylohyoid_Post_l: max_isometric_force=18.55 optimal_fiber_length=0.0282
        tendon_slack_length=0.01401339 pennation_angle_at_optimal=0 minimum_activation=0.01
      PathPoint digastric post-P1: cerv1 (0.0328 -0.0594 -0.0031)
      PathPoint digastric post-P2: skull (0.0542 -0.0389 -0.0291)
    Millard2012EquilibriumMuscle Mylohyoid_Ant_l: max_isometric_force=55.65 optimal_fiber_length=0.02
        tendon_slack_length=0.00274 pennation_angle_at_optimal=0 minimum_activation=0.01
      PathPoint digastric post-P1: cerv1 (0.0548 -0.0602 0.0031)
      PathPoint digastric post-P2: skull (0.0708 -0.0596 -0.0158)
    Millard2012EquilibriumMuscle Stylohyoid_Lat_l: max_isometric_force=6.825 optimal_fiber_length=0.0182
        tendon_slack_length=0.04955 pennation_angle_at_optimal=0.082 minimum_activation=0.01
      PathPoint digastric post-P1: skull (0.0242 -0.0008 -0.0376)
      PathPoint digastric post-P2: cerv3 (0.0248 -0.00611 -0.0159)
    Millard2012EquilibriumMuscle Stylohyoid_Med_l: max_isometric_force=6.825 optimal_fiber_length=0.0182
        tendon_slack_length=0.04362451 pennation_angle_at_optimal=0.08203 minimum_activation=0.01
      PathPoint digastric post-P1: skull (0.0247 -0.002 -0.0376)
      PathPoint digastric post-P2: cerv3 (0.0236 -0.00151 -0.0167)
    Millard2012EquilibriumMuscle Sterno_hyoid_l: max_isometric_force=20.3 optimal_fiber_length=0.0742
        tendon_slack_length=0.0318 pennation_angle_at_optimal=0 minimum_activation=0.01
      PathPoint stern_mast-P1: cerv3 (0.05271 -0.01412 -0.00629)
      PathPoint default: spine (-0.014033 0.31252 -0.01984)
    Millard2012EquilibriumMuscle SternoThyroid_l: max_isometric_force=22.75 optimal_fiber_length=0.06195
        tendon_slack_length=0.02655 pennation_angle_at_optimal=0 minimum_activation=0.01
      PathPoint stern_mast-P1: cerv3 (0.0404201 -0.04316 -0.0133)
      PathPoint default: spine (-0.014643 0.30575 -0.0153)
    Millard2012EquilibriumMuscle Omo_hyoid_l: max_isometric_force=26.25 optimal_fiber_length=0.04585
        tendon_slack_length=0.01965 pennation_angle_at_optimal=0 minimum_activation=0.01
      PathPoint stern_mast-P1: cerv3 (0.05212 -0.0139 -0.0132)
      PathPoint default: spine (-0.021033 0.37083 -0.03774)
