# OpenSim document version 40000
XsensDataReaderSettings:
  trial_prefix: l_comf_01-000_00
  ExperimentalSensors:
    ExperimentalSensor B42DA3: name_in_model=pelvis_imu
    ExperimentalSensor B42DAE: name_in_model=tibia_r_imu
    ExperimentalSensor B42DA2: name_in_model=femur_r_imu
    ExperimentalSensor B42D53: name_in_model=tibia_l_imu
    ExperimentalSensor B42D4D: name_in_model=femur_l_imu
    ExperimentalSensor B42D48: name_in_model=calcn_r_imu
    ExperimentalSensor B42D51: name_in_model=calcn_l_imu
